<Node name="" gravity="0 0 0" dt="0.01">
    <VisualStyle displayFlags="showBehavior hideVisual" />
    <Node name="Cube grid" >
        <EulerImplicitSolver name="cg_odesolver" printLog="0"  rayleighStiffness="0.1" rayleighMass="0.1" />
        <CGLinearSolver template="GraphScattered" name="linear solver" iterations="25" tolerance="1e-5" threshold="1e-5"/>

        <!--Subdivided cube-->
        <RegularGridTopology name="grid" n="10 10 10" min="0 0 0" max="1 1 1"  />
        <MechanicalObject name="DOF" template="Vec3d" />
        <UniformMass name="themass" totalMass="1" />

        <!--maintain points of plane x=0 fixed -->
        <BoxROI template="Vec3d" name="O_box_roi" box="0.99 -0.01 -0.01   1.01 1.01 1.01  "  drawPoints="1" drawSize="30" />
        <FixedConstraint indices="@[-1].indices" />


        <!--Decomposition of the cubes in tetrahedra, with tetrahedral FEM -->
        <Node name="Tetra" >
            <TetrahedronSetTopologyContainer name="TetraContainer" />
            <TetrahedronSetTopologyModifier />
            <TetrahedronSetGeometryAlgorithms template="Vec3d" />
            <Hexa2TetraTopologicalMapping name="default28" input="@grid" output="@TetraContainer" />
            <TetrahedralCorotationalFEMForceField template="Vec3d" name="FEM" method="polar" poissonRatio="0" youngModulus="1000" />

            <!--Extraction of the external triangles of the tetrahedra -->
            <Node name="Triangles" >
                <TriangleSetTopologyContainer name="TriangleContainer" />
                <TriangleSetTopologyModifier />
                <TriangleSetGeometryAlgorithms template="Vec3d" />
                <Tetra2TriangleTopologicalMapping input="@TetraContainer" output="@TriangleContainer" />

                <!--Apply a pressure to the triangles in the x=1 plane -->
                <TrianglePressureForceField normal="1 0 0" dmin="-0.01" dmax="0.01" pressure="100 0 0"  showForces="1"/>
            </Node>
        </Node>
    </Node>
</Node>
